# OpenSim document version 40000
Model Young_Healthy:
  gravity: 0 -9.80665 0
  publications: (TBD)
  length_units: meters
  force_units: N
  credits:
    A 2-D model for simulating walking with 11 degrees of freedom and 18 muscles. This model includes elements incorporated from Delp et al. (1990), Yamaguchi Zajac (1989), Anderson Pandy (1999), Sasaki et al. (2009) and Porsa et al. (2016). The CustomJoint and moving muscle insertion points for the knee joint are due to Ajay Seth License: Creative Commons (CCBY 3.0). You are free to distribute, remix, tweak, and build upon this work, even commercially, as long as you credit us for the original creation.
  SmoothSphereHalfSpaceForce [values shared by the 16 below unless stated]: socket_half_space=/contactgeometryset/floor
      dissipation=0.4163202 [s/m] static_friction=0.8 dynamic_friction=0.8 viscous_friction=0
      transition_velocity=0.1327498 [m/s] hertz_smoothing=300 hunt_crossley_smoothing=50
  SmoothSphereHalfSpaceForce Contact_Foot_Ground_R1: socket_sphere=/contactgeometryset/Foot_Ground_R1
      stiffness=1.474053e7 [N/m^2]
  SmoothSphereHalfSpaceForce Contact_Foot_Ground_R2: socket_sphere=/contactgeometryset/Foot_Ground_R2
      stiffness=1.593302e7
  SmoothSphereHalfSpaceForce Contact_Foot_Ground_R3: socket_sphere=/contactgeometryset/Foot_Ground_R3
      stiffness=1.474053e7
  SmoothSphereHalfSpaceForce Contact_Foot_Ground_R4: socket_sphere=/contactgeometryset/Foot_Ground_R4
      stiffness=1.552861e7
  SmoothSphereHalfSpaceForce Contact_Foot_Ground_R5: socket_sphere=/contactgeometryset/Foot_Ground_R5
      stiffness=1.663769e7
  SmoothSphereHalfSpaceForce Contact_Foot_Ground_R6: socket_sphere=/contactgeometryset/Foot_Ground_R6
      stiffness=1.498419e7
  SmoothSphereHalfSpaceForce Contact_Foot_Ground_R7: socket_sphere=/contactgeometryset/Foot_Ground_R7
      stiffness=1.630601e7
  SmoothSphereHalfSpaceForce Contact_Foot_Ground_R8: socket_sphere=/contactgeometryset/Foot_Ground_R8
      stiffness=1.617878e7
  SmoothSphereHalfSpaceForce Contact_Foot_Ground_L1: socket_sphere=/contactgeometryset/Foot_Ground_L1
      stiffness=1.474053e7
  SmoothSphereHalfSpaceForce Contact_Foot_Ground_L2: socket_sphere=/contactgeometryset/Foot_Ground_L2
      stiffness=1.593302e7
  SmoothSphereHalfSpaceForce Contact_Foot_Ground_L3: socket_sphere=/contactgeometryset/Foot_Ground_L3
      stiffness=1.474053e7
  SmoothSphereHalfSpaceForce Contact_Foot_Ground_L4: socket_sphere=/contactgeometryset/Foot_Ground_L4
      stiffness=1.552861e7
  SmoothSphereHalfSpaceForce Contact_Foot_Ground_L5: socket_sphere=/contactgeometryset/Foot_Ground_L5
      stiffness=1.663769e7
  SmoothSphereHalfSpaceForce Contact_Foot_Ground_L6: socket_sphere=/contactgeometryset/Foot_Ground_L6
      stiffness=1.498419e7
  SmoothSphereHalfSpaceForce Contact_Foot_Ground_L7: socket_sphere=/contactgeometryset/Foot_Ground_L7
      stiffness=1.630601e7
  SmoothSphereHalfSpaceForce Contact_Foot_Ground_L8: socket_sphere=/contactgeometryset/Foot_Ground_L8
      stiffness=1.617878e7
  Bhargava2004SmoothedMuscleMetabolics smooth_metabolic_cost_young: use_smoothing=true
    muscle_parameters:
      Bhargava2004SmoothedMuscleMetabolics_MuscleParameters [values shared by the 18 below unless stated]: specific_tension=250000 [N/m^2]
          use_provided_muscle_mass=true
      Bhargava2004SmoothedMuscleMetabolics_MuscleParameters hamstrings_r: socket_muscle=/forceset/hamstrings_r
          ratio_slow_twitch_fibers=0.49 provided_muscle_mass=1.732396 [kg]
      Bhargava2004SmoothedMuscleMetabolics_MuscleParameters hamstrings_l: socket_muscle=/forceset/hamstrings_l
          ratio_slow_twitch_fibers=0.49 provided_muscle_mass=1.732396
      Bhargava2004SmoothedMuscleMetabolics_MuscleParameters bifemsh_r: socket_muscle=/forceset/bifemsh_r
          ratio_slow_twitch_fibers=0.53 provided_muscle_mass=0.2743501
      Bhargava2004SmoothedMuscleMetabolics_MuscleParameters bifemsh_l: socket_muscle=/forceset/bifemsh_l
          ratio_slow_twitch_fibers=0.53 provided_muscle_mass=0.2743501
      Bhargava2004SmoothedMuscleMetabolics_MuscleParameters glut_max_r: socket_muscle=/forceset/glut_max_r
          ratio_slow_twitch_fibers=0.55 provided_muscle_mass=2.322303
      Bhargava2004SmoothedMuscleMetabolics_MuscleParameters glut_max_l: socket_muscle=/forceset/glut_max_l
          ratio_slow_twitch_fibers=0.55 provided_muscle_mass=2.322303
      Bhargava2004SmoothedMuscleMetabolics_MuscleParameters iliopsoas_r: socket_muscle=/forceset/iliopsoas_r
          ratio_slow_twitch_fibers=0.5 provided_muscle_mass=1.243901
      Bhargava2004SmoothedMuscleMetabolics_MuscleParameters iliopsoas_l: socket_muscle=/forceset/iliopsoas_l
          ratio_slow_twitch_fibers=0.5 provided_muscle_mass=1.243901
      Bhargava2004SmoothedMuscleMetabolics_MuscleParameters rect_fem_r: socket_muscle=/forceset/rect_fem_r
          ratio_slow_twitch_fibers=0.39 provided_muscle_mass=0.7294865
      Bhargava2004SmoothedMuscleMetabolics_MuscleParameters rect_fem_l: socket_muscle=/forceset/rect_fem_l
          ratio_slow_twitch_fibers=0.39 provided_muscle_mass=0.7294865
      Bhargava2004SmoothedMuscleMetabolics_MuscleParameters vasti_r: socket_muscle=/forceset/vasti_r
          ratio_slow_twitch_fibers=0.5 provided_muscle_mass=4.179745
      Bhargava2004SmoothedMuscleMetabolics_MuscleParameters vasti_l: socket_muscle=/forceset/vasti_l
          ratio_slow_twitch_fibers=0.5 provided_muscle_mass=4.179745
      Bhargava2004SmoothedMuscleMetabolics_MuscleParameters gastroc_r: socket_muscle=/forceset/gastroc_r
          ratio_slow_twitch_fibers=0.54 provided_muscle_mass=1.111535
      Bhargava2004SmoothedMuscleMetabolics_MuscleParameters gastroc_l: socket_muscle=/forceset/gastroc_l
          ratio_slow_twitch_fibers=0.54 provided_muscle_mass=1.111535
      Bhargava2004SmoothedMuscleMetabolics_MuscleParameters soleus_r: socket_muscle=/forceset/soleus_r
          ratio_slow_twitch_fibers=0.8 provided_muscle_mass=1.184064
      Bhargava2004SmoothedMuscleMetabolics_MuscleParameters soleus_l: socket_muscle=/forceset/soleus_l
          ratio_slow_twitch_fibers=0.8 provided_muscle_mass=1.184064
      Bhargava2004SmoothedMuscleMetabolics_MuscleParameters dorsiflexors_r: socket_muscle=/forceset/dorsiflexors_r
          ratio_slow_twitch_fibers=0.7 provided_muscle_mass=0.6423392
      Bhargava2004SmoothedMuscleMetabolics_MuscleParameters dorsiflexors_l: socket_muscle=/forceset/dorsiflexors_l
          ratio_slow_twitch_fibers=0.7 provided_muscle_mass=0.6423392
  Ground
  BodySet:
    Body pelvis: mass=12.03324 [kg] mass_center=(-0.0714457 0 0) inertia=(0.133411 0.113036 0.0751413 0 0 0)
        meshes=(sacrum.vtp pelvis.vtp l_pelvis.vtp)
    Body femur_r: mass=9.503776 mass_center=(0 -0.187044 0) inertia=(0.205311 0.0538194 0.216504 0 0 0)
        meshes=femur.vtp
    Body tibia_r: mass=3.788166 mass_center=(0 -0.191928 0) inertia=(0.0671406 0.00679399 0.0680731 0 0 0)
        meshes=(tibia.vtp fibula.vtp)
    Body talus_r: mass=0.1021758 mass_center=(0 0 0) inertia=(0.00125583 0.00125583 0.00125583 0 0 0) meshes=talus.vtp
    Body calcn_r: mass=1.277197 mass_center=(0.101933 0.0305799 0) inertia=(0.00175816 0.00489774 0.0051489 0 0 0)
        meshes=foot.vtp
    Body toes_r: mass=0.2213127 mass_center=(0.0335112 0.00581119 -0.0169492)
        inertia=(9.7257e-5 0.000194514 9.7257e-5 0 0 0) meshes=bofoot.vtp
    Body femur_l: mass=9.503776 mass_center=(0 -0.187044 0) inertia=(0.205311 0.0538194 0.216504 0 0 0)
        meshes=l_femur.vtp
    Body tibia_l: mass=3.788166 mass_center=(0 -0.191928 0) inertia=(0.0671406 0.00679399 0.0680731 0 0 0)
        meshes=(l_tibia.vtp l_fibula.vtp)
    Body talus_l: mass=0.1021758 mass_center=(0 0 0) inertia=(0.00125583 0.00125583 0.00125583 0 0 0)
        meshes=l_talus.vtp
    Body calcn_l: mass=1.277197 mass_center=(0.101933 0.0305799 0) inertia=(0.00175816 0.00489774 0.0051489 0 0 0)
        meshes=l_foot.vtp
    Body toes_l: mass=0.2213127 mass_center=(0.0335112 0.00581119 0.0169492)
        inertia=(9.7257e-5 0.000194514 9.7257e-5 0 0 0) meshes=l_bofoot.vtp
    Body torso: mass=34.98151 mass_center=(-0.0304989 0.325321 0) inertia=(1.75218 0.897776 1.70096 0 0 0)
        meshes=(hat_spine.vtp hat_jaw.vtp hat_skull.vtp hat_ribs.vtp)
  JointSet:
    CustomJoint ground_pelvis: socket_parent_frame=ground_offset socket_child_frame=pelvis_offset
      Coordinate pelvis_tilt: default_value=0 range=(-1.570796 1.570796) clamped=false
      Coordinate pelvis_tx: default_value=0 range=(-5 5) clamped=false
      Coordinate pelvis_ty: default_value=1.2 range=(-1 2) clamped=false
      PhysicalOffsetFrame ground_offset: socket_parent=/ground translation=(0 0 0) [meters]
      PhysicalOffsetFrame pelvis_offset: socket_parent=/bodyset/pelvis translation=(0 0 0)
      SpatialTransform: axes_held_at_zero=(rotation2 rotation3)
        TransformAxis rotation1: coordinates=pelvis_tilt axis=(0 0 1) LinearFunction(coefficients=1 0)
        TransformAxis translation1: coordinates=pelvis_tx axis=(1 0 0) LinearFunction(coefficients=1 0)
        TransformAxis translation2: coordinates=pelvis_ty axis=(0 1 0) LinearFunction(coefficients=1 0)
        TransformAxis translation3: axis=(0 0 1) MultiplierFunction(scale=1, Constant(value=0.02))
    PinJoint hip_r: socket_parent_frame=pelvis_offset socket_child_frame=femur_r_offset
      Coordinate hip_flexion_r: default_value=0 range=(-2.094395 2.094395) clamped=false
      PhysicalOffsetFrame pelvis_offset: socket_parent=/bodyset/pelvis translation=(-0.0714457 -0.0667971 0.0843807)
      PhysicalOffsetFrame femur_r_offset: socket_parent=/bodyset/femur_r translation=(0 0 0)
    CustomJoint knee_r: socket_parent_frame=femur_r_offset socket_child_frame=tibia_r_offset
      Coordinate knee_angle_r: default_value=0 range=(-2.094395 0.1745329) clamped=false
      PhysicalOffsetFrame femur_r_offset: socket_parent=/bodyset/femur_r translation=(0 0 0)
      PhysicalOffsetFrame tibia_r_offset: socket_parent=/bodyset/tibia_r translation=(0 0 0)
      SpatialTransform: axes_held_at_zero=(rotation2 rotation3 translation3)
        TransformAxis rotation1: coordinates=knee_angle_r axis=(0 0 1) LinearFunction(coefficients=1 0)
        TransformAxis translation1: coordinates=knee_angle_r axis=(1 0 0)
          MultiplierFunction: scale=1.100258
            SimmSpline: x=(-2.0944 -1.74533 -1.39626 -1.0472 -0.698132 -0.349066 -0.174533 0.197344 0.337395 0.490178 1.52146 2.0944)
                y=(-0.0032 0.00179 0.00411 0.0041 0.00212 -0.001 -0.0031 -0.005227 -0.005435 -0.005574 -0.005435 -0.00525)
        TransformAxis translation2: coordinates=knee_angle_r axis=(0 1 0)
          MultiplierFunction: scale=1.100258
            SimmSpline: x=(-2.0944 -1.22173 -0.523599 -0.349066 -0.174533 0.159149 2.0944)
                y=(-0.4226 -0.4082 -0.399 -0.3976 -0.3966 -0.395264 -0.396)
    PinJoint ankle_r: socket_parent_frame=tibia_r_offset socket_child_frame=talus_r_offset
      Coordinate ankle_angle_r: default_value=-0.3490659 range=(-1.570796 1.570796) clamped=false
      PhysicalOffsetFrame tibia_r_offset: socket_parent=/bodyset/tibia_r translation=(0 -0.442042 0)
      PhysicalOffsetFrame talus_r_offset: socket_parent=/bodyset/talus_r translation=(0 0 0)
    WeldJoint subtalar_r: socket_parent_frame=talus_r_offset socket_child_frame=calcn_r_offset
      PhysicalOffsetFrame talus_r_offset: socket_parent=/bodyset/talus_r translation=(-0.0497128 -0.042761 0.00807311)
      PhysicalOffsetFrame calcn_r_offset: socket_parent=/bodyset/calcn_r translation=(0 0 0)
    PinJoint mtp_r: socket_parent_frame=calcn_r_offset socket_child_frame=toes_r_offset
      Coordinate mtp_angle_r: default_value=0 range=(-1.570796 1.570796) clamped=false
      PhysicalOffsetFrame calcn_r_offset: socket_parent=/bodyset/calcn_r translation=(0.182256 -0.00203866 0.00110088)
      PhysicalOffsetFrame toes_r_offset: socket_parent=/bodyset/toes_r translation=(0 0 0)
    PinJoint hip_l: socket_parent_frame=pelvis_offset socket_child_frame=femur_l_offset
      Coordinate hip_flexion_l: default_value=0 range=(-2.094395 2.094395) clamped=false
      PhysicalOffsetFrame pelvis_offset: socket_parent=/bodyset/pelvis translation=(-0.0714457 -0.0667971 -0.0843807)
      PhysicalOffsetFrame femur_l_offset: socket_parent=/bodyset/femur_l translation=(0 0 0)
    CustomJoint knee_l: socket_parent_frame=femur_l_offset socket_child_frame=tibia_l_offset
      Coordinate knee_angle_l: default_value=0 range=(-2.094395 0.1745329) clamped=false
      PhysicalOffsetFrame femur_l_offset: socket_parent=/bodyset/femur_l translation=(0 0 0)
      PhysicalOffsetFrame tibia_l_offset: socket_parent=/bodyset/tibia_l translation=(0 0 0)
      SpatialTransform: axes_held_at_zero=(rotation2 rotation3 translation3)
        TransformAxis rotation1: coordinates=knee_angle_l axis=(0 0 1) LinearFunction(coefficients=1 0)
        TransformAxis translation1: coordinates=knee_angle_l axis=(1 0 0)
          MultiplierFunction: scale=1.100258
            SimmSpline: x=(-2.0944 -1.74533 -1.39626 -1.0472 -0.698132 -0.349066 -0.174533 0.197344 0.337395 0.490178 1.52146 2.0944)
                y=(-0.0032 0.00179 0.00411 0.0041 0.00212 -0.001 -0.0031 -0.005227 -0.005435 -0.005574 -0.005435 -0.00525)
        TransformAxis translation2: coordinates=knee_angle_l axis=(0 1 0)
          MultiplierFunction: scale=1.100258
            SimmSpline: x=(-2.0944 -1.22173 -0.523599 -0.349066 -0.174533 0.159149 2.0944)
                y=(-0.4226 -0.4082 -0.399 -0.3976 -0.3966 -0.395264 -0.396)
    PinJoint ankle_l: socket_parent_frame=tibia_l_offset socket_child_frame=talus_l_offset
      Coordinate ankle_angle_l: default_value=-0.3490659 range=(-1.047198 1.047198) clamped=false
      PhysicalOffsetFrame tibia_l_offset: socket_parent=/bodyset/tibia_l translation=(0 -0.442042 0)
      PhysicalOffsetFrame talus_l_offset: socket_parent=/bodyset/talus_l translation=(0 0 0)
    WeldJoint subtalar_l: socket_parent_frame=talus_l_offset socket_child_frame=calcn_l_offset
      PhysicalOffsetFrame talus_l_offset: socket_parent=/bodyset/talus_l translation=(-0.0497128 -0.042761 -0.00807311)
      PhysicalOffsetFrame calcn_l_offset: socket_parent=/bodyset/calcn_l translation=(0 0 0)
    PinJoint mtp_l: socket_parent_frame=calcn_l_offset socket_child_frame=toes_l_offset
      Coordinate mtp_angle_l: default_value=0 range=(-1.570796 1.570796) clamped=false
      PhysicalOffsetFrame calcn_l_offset: socket_parent=/bodyset/calcn_l translation=(0.182256 -0.00203866 -0.00110088)
      PhysicalOffsetFrame toes_l_offset: socket_parent=/bodyset/toes_l translation=(0 0 0)
    WeldJoint back: socket_parent_frame=pelvis_offset socket_child_frame=torso_offset
      PhysicalOffsetFrame pelvis_offset: socket_parent=/bodyset/pelvis translation=(-0.101762 0.0823596 0)
      PhysicalOffsetFrame torso_offset: socket_parent=/bodyset/torso translation=(0 0 0)
  ForceSet:
    CoordinateLimitForce hip_limit_r: coordinate=hip_flexion_r upper_stiffness=500 [N*m/degree]
        upper_limit=103.7 [degrees] lower_stiffness=729.4401 [N*m/degree] lower_limit=-36.52 [degrees] damping=0
        transition=1 [degrees]
    CoordinateLimitForce hip_limit_l: coordinate=hip_flexion_l upper_stiffness=500 upper_limit=103.7
        lower_stiffness=729.4401 lower_limit=-36.52 damping=0 transition=1
    CoordinateLimitForce knee_limit_r: coordinate=knee_angle_r upper_stiffness=595.4197 upper_limit=11.4485
        lower_stiffness=105.2106 lower_limit=-137.51 damping=0 transition=7
    CoordinateLimitForce knee_limit_l: coordinate=knee_angle_l upper_stiffness=595.4197 upper_limit=11.4485
        lower_stiffness=105.2106 lower_limit=-137.51 damping=0 transition=7
    CoordinateLimitForce ankle_limit_r: coordinate=ankle_angle_r upper_stiffness=889.7686 upper_limit=35.8
        lower_stiffness=390.7439 lower_limit=-48.4 damping=0 transition=9
    CoordinateLimitForce ankle_limit_l: coordinate=ankle_angle_l upper_stiffness=889.7686 upper_limit=35.8
        lower_stiffness=390.7439 lower_limit=-48.4 damping=0 transition=9
    SpringGeneralizedForce mtp_damping_r: coordinate=mtp_angle_r stiffness=25 rest_length=0 viscosity=0.03
    SpringGeneralizedForce mtp_damping_l: coordinate=mtp_angle_l stiffness=25 rest_length=0 viscosity=0.03
    SpringGeneralizedForce hip_flexion_damping_r: coordinate=hip_flexion_r stiffness=0 rest_length=0 viscosity=0.1
    SpringGeneralizedForce hip_flexion_damping_l: coordinate=hip_flexion_l stiffness=0 rest_length=0 viscosity=0.1
    SpringGeneralizedForce knee_damping_r: coordinate=knee_angle_r stiffness=0 rest_length=0 viscosity=0.1
    SpringGeneralizedForce knee_damping_l: coordinate=knee_angle_l stiffness=0 rest_length=0 viscosity=0.1
    SpringGeneralizedForce ankle_damping_r: coordinate=ankle_angle_r stiffness=0 rest_length=0 viscosity=0.5
    SpringGeneralizedForce ankle_damping_l: coordinate=ankle_angle_l stiffness=0 rest_length=0 viscosity=0.5
    DeGrooteFregly2016Muscle [values shared by the 18 below unless stated]: min_control=0.01 max_control=1
        max_contraction_velocity=10 activation_time_constant=0.055 deactivation_time_constant=0.065
        default_activation=0.05 fiber_damping=0.1 passive_fiber_strain_at_one_norm_force=0.7
        tendon_strain_at_one_norm_force=0.049 tendon_compliance_dynamics_mode=implicit
    DeGrooteFregly2016Muscle hamstrings_r: max_isometric_force=3373.863 optimal_fiber_length=0.121137
        tendon_slack_length=0.346982 pennation_angle_at_optimal=0.2253 [radians]
      PathPoint bifemlh_r-P1: pelvis (-0.127289 -0.103652 0.0701723)
      PathPoint bifemlh_r-P2: tibia_r (-0.0309429 -0.0370081 0.0302542)
      PathPoint bifemlh_r-P3: tibia_r (-0.0240553 -0.0578766 0.0352605)
    DeGrooteFregly2016Muscle bifemsh_r: max_isometric_force=586.7953 optimal_fiber_length=0.1103
        tendon_slack_length=0.158 pennation_angle_at_optimal=0.2642232
      PathPoint P1: femur_r (0.00550129 -0.232265 0.025746)
      PathPoint P2: tibia_r (-0.0309429 -0.0370081 0.0302542)
      PathPoint P3: tibia_r (-0.0240553 -0.0578766 0.0352605)
    DeGrooteFregly2016Muscle glut_max_r: max_isometric_force=3491.829 optimal_fiber_length=0.1569
        tendon_slack_length=0.082776 pennation_angle_at_optimal=0.3673821
      PathPoint glut_max2_r-P1: pelvis (-0.136322 0.0177856 0.0568938)
      PathPoint glut_max2_r-P2: pelvis (-0.139052 -0.0525485 0.0923644)
      PathPoint glut_max2_r-P3: femur_r (-0.046871 -0.0583136 0.0322376)
      PathPoint glut_max2_r-P4: femur_r (-0.017164 -0.111786 0.0461008)
    DeGrooteFregly2016Muscle iliopsoas_r: max_isometric_force=2598.633 optimal_fiber_length=0.112927
        tendon_slack_length=0.15346 pennation_angle_at_optimal=0.2391189
      PathPoint psoas_r-P1: pelvis (-0.0653824 0.0896355 0.0292048)
      PathPoint psoas_r-P2: pelvis (-0.024051 -0.0576012 0.0767005)
      ConditionalPathPoint psoas_r-P3: pelvis (-0.0291037 -0.081349 0.0824606)
          socket_coordinate=/jointset/hip_r/hip_flexion_r range=(-1.5708 0.785398) [radians]
      PathPoint psoas_r-P4: femur_r (0.00176041 -0.0557831 0.00418098)
      PathPoint psoas_r-P5: femur_r (-0.0206849 -0.0656854 0.0114427)
    DeGrooteFregly2016Muscle rect_fem_r: max_isometric_force=2267.423 optimal_fiber_length=0.0759
        tendon_slack_length=0.3888 pennation_angle_at_optimal=0.2170149
      PathPoint P1: pelvis (-0.0298112 -0.031428 0.097821)
      ConditionalPathPoint P2: femur_r (0.0367486 -0.443404 0.00209049) socket_coordinate=/jointset/knee_r/knee_angle_r
          range=(-2.61799 -1.45997)
      MovingPathPoint P3: tibia_r socket_x_coordinate=/jointset/knee_r/knee_angle_r
          socket_y_coordinate=/jointset/knee_r/knee_angle_r socket_z_coordinate=/jointset/knee_r/knee_angle_r
        x_location: MultiplierFunction: scale=1.028004
          SimmSpline: x=(-2.0944 -1.99997 -1.5708 -1.45752 -1.39626 -1.0472 -0.698132 -0.526391 -0.349066 -0.174533 0 0.00017453 0.00034907 0.0279253 0.0872665 0.174533 2.0944)
              y=(0.0155805 0.0179938 0.0275081 0.0296564 0.0307615 0.0365695 0.0422074 0.0450902 0.048391 0.0534299 0.0617576 0.0617669 0.0617762 0.0633083 0.066994 0.0733035 0.0573481)
        y_location: MultiplierFunction: scale=1.028004
          SimmSpline: x=(-2.0944 -1.99997 -1.5708 -1.45752 -1.39626 -1.0472 -0.698132 -0.526391 -0.349066 -0.174533 0 0.00017453 0.00034907 0.0279253 0.0872665 0.174533 2.0944)
              y=(0.0234116 0.0237613 0.0251141 0.0252795 0.0253146 0.0249184 0.0242373 0.0238447 0.0234197 0.0227644 0.020984 0.0209814 0.0209788 0.0205225 0.0191754 0.0159554 -0.0673774)
        z_location: MultiplierFunction: scale=1.028004
          SimmSpline: x=(-2.0944 0.1745) y=(0.0014 0.0014)
    DeGrooteFregly2016Muscle vasti_r: max_isometric_force=8573.087 optimal_fiber_length=0.115019
        tendon_slack_length=0.13516 pennation_angle_at_optimal=0.267941
      PathPoint vas_int_r-P1: femur_r (0.0319075 -0.211689 0.034108)
      PathPoint vas_int_r-P2: femur_r (0.0368586 -0.229294 0.0313573)
      ConditionalPathPoint vas_int_r-P3: femur_r (0.0377389 -0.443404 0.00605142)
          socket_coordinate=/jointset/knee_r/knee_angle_r range=(-2.61799 -1.42)
      MovingPathPoint vas_int_r-P4: tibia_r socket_x_coordinate=/jointset/knee_r/knee_angle_r
          socket_y_coordinate=/jointset/knee_r/knee_angle_r socket_z_coordinate=/jointset/knee_r/knee_angle_r
        x_location: MultiplierFunction: scale=1.028004
          SimmSpline: x=(-2.0944 -1.99997 -1.5708 -1.45752 -1.39626 -1.0472 -0.698132 -0.526391 -0.349066 -0.174533 0 0.00017453 0.00034907 0.0279253 0.0872665 0.174533 2.0944)
              y=(0.0082733 0.0106866 0.0202042 0.022353 0.0234583 0.0292715 0.0349465 0.037871 0.0412569 0.0465287 0.0554632 0.0554735 0.0554837 0.0571717 0.061272 0.0684368 0.0648818)
        y_location: MultiplierFunction: scale=1.028004
          SimmSpline: x=(-2.0944 -1.99997 -1.5708 -1.45752 -1.39626 -1.0472 -0.698132 -0.526391 -0.349066 -0.174533 0 0.00017453 0.00034907 0.0279253 0.0872665 0.174533 2.0944)
              y=(0.025599 0.0259487 0.0273124 0.0274796 0.0275151 0.0271363 0.0265737 0.0263073 0.0261187 0.0260129 0.0252923 0.0252911 0.0252898 0.0250526 0.0242191 0.0218288 -0.0685706)
        z_location: MultiplierFunction: scale=1.028004
          SimmSpline: x=(-2.0944 2.0944) y=(0.0018 0.0018)
    DeGrooteFregly2016Muscle gastroc_r: max_isometric_force=4183.477 optimal_fiber_length=0.062682
        tendon_slack_length=0.403329 pennation_angle_at_optimal=0.1820829
      PathPoint med_gas_r-P1: femur_r (-0.0209049 -0.432291 -0.025856)
      ConditionalPathPoint med_gas_r-P2: femur_r (-0.0330078 -0.442523 -0.0283866)
          socket_coordinate=/jointset/knee_r/knee_angle_r range=(-0.785398 0.174533)
      PathPoint med_gas_r-P3: calcn_r (0 0.0315993 -0.00540246)
    DeGrooteFregly2016Muscle soleus_r: max_isometric_force=6348.626 optimal_fiber_length=0.044
        tendon_slack_length=0.27025 pennation_angle_at_optimal=0.3814289
      PathPoint P1: tibia_r (-0.00246721 -0.157593 0.00729883)
      PathPoint P2: calcn_r (0 0.0315993 -0.00540246)
    DeGrooteFregly2016Muscle dorsiflexors_r: max_isometric_force=2179.744 optimal_fiber_length=0.069521
        tendon_slack_length=0.256088 pennation_angle_at_optimal=0.2021615
      PathPoint P1: tibia_r (0.0184013 -0.166948 0.011822)
      PathPoint P2: tibia_r (0.0338214 -0.406164 -0.0181957)
      PathPoint P3: calcn_r (0.118854 0.0181441 -0.0310896)
    DeGrooteFregly2016Muscle hamstrings_l: max_isometric_force=3373.863 optimal_fiber_length=0.121137
        tendon_slack_length=0.346982 pennation_angle_at_optimal=0.2253
      PathPoint bifemlh_l-P1: pelvis (-0.127289 -0.103652 -0.0701723)
      PathPoint bifemlh_l-P2: tibia_l (-0.0309429 -0.0370081 -0.0302542)
      PathPoint bifemlh_l-P3: tibia_l (-0.0240553 -0.0578766 -0.0352605)
    DeGrooteFregly2016Muscle bifemsh_l: max_isometric_force=586.7953 optimal_fiber_length=0.1103
        tendon_slack_length=0.158 pennation_angle_at_optimal=0.2642232
      PathPoint P1: femur_l (0.00550129 -0.232265 -0.025746)
      PathPoint P2: tibia_l (-0.0309429 -0.0370081 -0.0302542)
      PathPoint P3: tibia_l (-0.0240553 -0.0578766 -0.0352605)
    DeGrooteFregly2016Muscle glut_max_l: max_isometric_force=3491.829 optimal_fiber_length=0.1569
        tendon_slack_length=0.082776 pennation_angle_at_optimal=0.3673821
      PathPoint glut_max2_l-P1: pelvis (-0.136322 0.0177856 -0.0568938)
      PathPoint glut_max2_l-P2: pelvis (-0.139052 -0.0525485 -0.0923644)
      PathPoint glut_max2_l-P3: femur_l (-0.046871 -0.0583136 -0.0322376)
      PathPoint glut_max2_l-P4: femur_l (-0.017164 -0.111786 -0.0461008)
    DeGrooteFregly2016Muscle iliopsoas_l: max_isometric_force=2598.633 optimal_fiber_length=0.112927
        tendon_slack_length=0.15346 pennation_angle_at_optimal=0.2391189
      PathPoint psoas_l-P1: pelvis (-0.0653824 0.0896355 -0.0292048)
      PathPoint psoas_l-P2: pelvis (-0.024051 -0.0576012 -0.0767005)
      ConditionalPathPoint psoas_l-P3: pelvis (-0.0291037 -0.081349 -0.0824606)
          socket_coordinate=/jointset/hip_l/hip_flexion_l range=(-1.5708 0.785398)
      PathPoint psoas_l-P4: femur_l (0.00176041 -0.0557831 -0.00418098)
      PathPoint psoas_l-P5: femur_l (-0.0206849 -0.0656854 -0.0114427)
    DeGrooteFregly2016Muscle rect_fem_l: max_isometric_force=2267.423 optimal_fiber_length=0.0759
        tendon_slack_length=0.3888 pennation_angle_at_optimal=0.2170149
      PathPoint P1: pelvis (-0.0298112 -0.031428 -0.097821)
      ConditionalPathPoint P2: femur_l (0.0367486 -0.443404 -0.00209049)
          socket_coordinate=/jointset/knee_l/knee_angle_l range=(-2.61799 -1.45997)
      MovingPathPoint P3: tibia_l socket_x_coordinate=/jointset/knee_l/knee_angle_l
          socket_y_coordinate=/jointset/knee_l/knee_angle_l socket_z_coordinate=/jointset/knee_l/knee_angle_l
        x_location: MultiplierFunction: scale=1.028004
          SimmSpline: x=(-2.0944 -1.99997 -1.5708 -1.45752 -1.39626 -1.0472 -0.698132 -0.526391 -0.349066 -0.174533 0 0.00017453 0.00034907 0.0279253 0.0872665 0.174533 2.0944)
              y=(0.0155805 0.0179938 0.0275081 0.0296564 0.0307615 0.0365695 0.0422074 0.0450902 0.048391 0.0534299 0.0617576 0.0617669 0.0617762 0.0633083 0.066994 0.0733035 0.0573481)
        y_location: MultiplierFunction: scale=1.028004
          SimmSpline: x=(-2.0944 -1.99997 -1.5708 -1.45752 -1.39626 -1.0472 -0.698132 -0.526391 -0.349066 -0.174533 0 0.00017453 0.00034907 0.0279253 0.0872665 0.174533 2.0944)
              y=(0.0234116 0.0237613 0.0251141 0.0252795 0.0253146 0.0249184 0.0242373 0.0238447 0.0234197 0.0227644 0.020984 0.0209814 0.0209788 0.0205225 0.0191754 0.0159554 -0.0673774)
        z_location: MultiplierFunction: scale=1.028004
          SimmSpline: x=(-2.0944 0.1745) y=(-0.0014 -0.0014)
    DeGrooteFregly2016Muscle vasti_l: max_isometric_force=8573.087 optimal_fiber_length=0.115019
        tendon_slack_length=0.13516 pennation_angle_at_optimal=0.267941
      PathPoint vas_int_l-P1: femur_l (0.0319075 -0.211689 -0.034108)
      PathPoint vas_int_l-P2: femur_l (0.0368586 -0.229294 -0.0313573)
      ConditionalPathPoint vas_int_l-P3: femur_l (0.0377389 -0.443404 -0.00605142)
          socket_coordinate=/jointset/knee_l/knee_angle_l range=(-2.61799 -1.42)
      MovingPathPoint vas_int_l-P4: tibia_l socket_x_coordinate=/jointset/knee_l/knee_angle_l
          socket_y_coordinate=/jointset/knee_l/knee_angle_l socket_z_coordinate=/jointset/knee_l/knee_angle_l
        x_location: MultiplierFunction: scale=1.028004
          SimmSpline: x=(-2.0944 -1.99997 -1.5708 -1.45752 -1.39626 -1.0472 -0.698132 -0.526391 -0.349066 -0.174533 0 0.00017453 0.00034907 0.0279253 0.0872665 0.174533 2.0944)
              y=(0.0082733 0.0106866 0.0202042 0.022353 0.0234583 0.0292715 0.0349465 0.037871 0.0412569 0.0465287 0.0554632 0.0554735 0.0554837 0.0571717 0.061272 0.0684368 0.0648818)
        y_location: MultiplierFunction: scale=1.028004
          SimmSpline: x=(-2.0944 -1.99997 -1.5708 -1.45752 -1.39626 -1.0472 -0.698132 -0.526391 -0.349066 -0.174533 0 0.00017453 0.00034907 0.0279253 0.0872665 0.174533 2.0944)
              y=(0.025599 0.0259487 0.0273124 0.0274796 0.0275151 0.0271363 0.0265737 0.0263073 0.0261187 0.0260129 0.0252923 0.0252911 0.0252898 0.0250526 0.0242191 0.0218288 -0.0685706)
        z_location: MultiplierFunction: scale=1.028004
          SimmSpline: x=(-2.0944 2.0944) y=(-0.0018 -0.0018)
    DeGrooteFregly2016Muscle gastroc_l: max_isometric_force=4183.477 optimal_fiber_length=0.062682
        tendon_slack_length=0.403329 pennation_angle_at_optimal=0.1820829
      PathPoint med_gas_l-P1: femur_l (-0.0209049 -0.432291 0.025856)
      ConditionalPathPoint med_gas_l-P2: femur_l (-0.0330078 -0.442523 0.0283866)
          socket_coordinate=/jointset/knee_l/knee_angle_l range=(-0.785398 0.174533)
      PathPoint med_gas_l-P3: calcn_l (0 0.0315993 0.00540246)
    DeGrooteFregly2016Muscle soleus_l: max_isometric_force=6348.626 optimal_fiber_length=0.044
        tendon_slack_length=0.27025 pennation_angle_at_optimal=0.3814289
      PathPoint P1: tibia_l (-0.00246721 -0.157593 -0.00729883)
      PathPoint P2: calcn_l (0 0.0315993 0.00540246)
    DeGrooteFregly2016Muscle dorsiflexors_l: max_isometric_force=2179.744 optimal_fiber_length=0.069521
        tendon_slack_length=0.256088 pennation_angle_at_optimal=0.2021615
      PathPoint P1: tibia_l (0.0184013 -0.166948 -0.011822)
      PathPoint P2: tibia_l (0.0338214 -0.406164 0.0181957)
      PathPoint P3: calcn_l (0.118854 0.0181441 0.0310896)
  ContactGeometrySet:
    ContactSphere Foot_Ground_R1: socket_frame=/bodyset/calcn_r location=(0.01 -0.01 -0.02) radius=0.0465
    ContactSphere Foot_Ground_R2: socket_frame=/bodyset/calcn_r location=(0.16 -0.01 -0.035) radius=0.0398
    ContactSphere Foot_Ground_R3: socket_frame=/bodyset/calcn_r location=(0.01 -0.01 0.0075) radius=0.0465
    ContactSphere Foot_Ground_R4: socket_frame=/bodyset/calcn_r location=(0.125 -0.01 0.05) radius=0.0419
    ContactSphere Foot_Ground_R5: socket_frame=/bodyset/toes_r location=(0.07 -0.008 0.01) radius=0.0365
    ContactSphere Foot_Ground_R6: socket_frame=/bodyset/calcn_r location=(0.075 -0.01 -0.00175) radius=0.045
    ContactSphere Foot_Ground_R7: socket_frame=/bodyset/toes_r location=(0.035 -0.008 -0.02) radius=0.038
    ContactSphere Foot_Ground_R8: socket_frame=/bodyset/toes_r location=(0.02 -0.008 0.03) radius=0.0386
    ContactSphere Foot_Ground_L1: socket_frame=/bodyset/calcn_l location=(0.01 -0.01 0.02) radius=0.0465
    ContactSphere Foot_Ground_L2: socket_frame=/bodyset/calcn_l location=(0.16 -0.01 0.035) radius=0.0398
    ContactSphere Foot_Ground_L3: socket_frame=/bodyset/calcn_l location=(0.01 -0.01 -0.0075) radius=0.0465
    ContactSphere Foot_Ground_L4: socket_frame=/bodyset/calcn_l location=(0.125 -0.01 -0.05) radius=0.0419
    ContactSphere Foot_Ground_L5: socket_frame=/bodyset/toes_l location=(0.07 -0.008 -0.01) radius=0.0365
    ContactSphere Foot_Ground_L6: socket_frame=/bodyset/calcn_l location=(0.075 -0.01 0.00175) radius=0.045
    ContactSphere Foot_Ground_L7: socket_frame=/bodyset/toes_l location=(0.035 -0.008 0.02) radius=0.038
    ContactSphere Foot_Ground_L8: socket_frame=/bodyset/toes_l location=(0.02 -0.008 -0.03) radius=0.0386
    ContactHalfSpace floor: socket_frame=/ground orientation=(0 0 -1.570796)
  ProbeSet:
    Umberger2010MuscleMetabolicsProbe Metcost_Umberger_young: probe_operation=value activation_maintenance_rate_on=true
        shortening_rate_on=true basal_rate_on=true mechanical_work_rate_on=true report_total_metabolics_only=false
      Umberger2010MuscleMetabolicsProbe_MetabolicMuscleParameterSet:
        Umberger2010MuscleMetabolicsProbe_MetabolicMuscleParameter [values shared by the 18 below unless stated]: use_provided_muscle_mass=false
            provided_muscle_mass=-1 [kg]
        Umberger2010MuscleMetabolicsProbe_MetabolicMuscleParameter hamstrings_r: ratio_slow_twitch_fibers=0.49
        Umberger2010MuscleMetabolicsProbe_MetabolicMuscleParameter bifemsh_r: ratio_slow_twitch_fibers=0.53
        Umberger2010MuscleMetabolicsProbe_MetabolicMuscleParameter glut_max_r: ratio_slow_twitch_fibers=0.55
        Umberger2010MuscleMetabolicsProbe_MetabolicMuscleParameter iliopsoas_r: ratio_slow_twitch_fibers=0.5
        Umberger2010MuscleMetabolicsProbe_MetabolicMuscleParameter rect_fem_r: ratio_slow_twitch_fibers=0.39
        Umberger2010MuscleMetabolicsProbe_MetabolicMuscleParameter vasti_r: ratio_slow_twitch_fibers=0.5
        Umberger2010MuscleMetabolicsProbe_MetabolicMuscleParameter gastroc_r: ratio_slow_twitch_fibers=0.54
        Umberger2010MuscleMetabolicsProbe_MetabolicMuscleParameter soleus_r: ratio_slow_twitch_fibers=0.8
        Umberger2010MuscleMetabolicsProbe_MetabolicMuscleParameter dorsiflexors_r: ratio_slow_twitch_fibers=0.7
        Umberger2010MuscleMetabolicsProbe_MetabolicMuscleParameter hamstrings_l: ratio_slow_twitch_fibers=0.49
        Umberger2010MuscleMetabolicsProbe_MetabolicMuscleParameter bifemsh_l: ratio_slow_twitch_fibers=0.53
        Umberger2010MuscleMetabolicsProbe_MetabolicMuscleParameter glut_max_l: ratio_slow_twitch_fibers=0.55
        Umberger2010MuscleMetabolicsProbe_MetabolicMuscleParameter iliopsoas_l: ratio_slow_twitch_fibers=0.5
        Umberger2010MuscleMetabolicsProbe_MetabolicMuscleParameter rect_fem_l: ratio_slow_twitch_fibers=0.39
        Umberger2010MuscleMetabolicsProbe_MetabolicMuscleParameter vasti_l: ratio_slow_twitch_fibers=0.5
        Umberger2010MuscleMetabolicsProbe_MetabolicMuscleParameter gastroc_l: ratio_slow_twitch_fibers=0.54
        Umberger2010MuscleMetabolicsProbe_MetabolicMuscleParameter soleus_l: ratio_slow_twitch_fibers=0.8
        Umberger2010MuscleMetabolicsProbe_MetabolicMuscleParameter dorsiflexors_l: ratio_slow_twitch_fibers=0.7
    Bhargava2004MuscleMetabolicsProbe Metcost_Bhargava_young: basal_rate_on=true
      Bhargava2004MuscleMetabolicsProbe_MetabolicMuscleParameterSet:
        Bhargava2004MuscleMetabolicsProbe_MetabolicMuscleParameter [values shared by the 18 below unless stated]: use_provided_muscle_mass=true
            activation_constant_slow_twitch=40 activation_constant_fast_twitch=133 maintenance_constant_slow_twitch=74
            maintenance_constant_fast_twitch=111
        Bhargava2004MuscleMetabolicsProbe_MetabolicMuscleParameter hamstrings_r: ratio_slow_twitch_fibers=0.49
            provided_muscle_mass=1.732396 [kg]
        Bhargava2004MuscleMetabolicsProbe_MetabolicMuscleParameter hamstrings_l: ratio_slow_twitch_fibers=0.49
            provided_muscle_mass=1.732396
        Bhargava2004MuscleMetabolicsProbe_MetabolicMuscleParameter bifemsh_r: ratio_slow_twitch_fibers=0.53
            provided_muscle_mass=0.2743501
        Bhargava2004MuscleMetabolicsProbe_MetabolicMuscleParameter bifemsh_l: ratio_slow_twitch_fibers=0.53
            provided_muscle_mass=0.2743501
        Bhargava2004MuscleMetabolicsProbe_MetabolicMuscleParameter glut_max_r: ratio_slow_twitch_fibers=0.55
            provided_muscle_mass=2.322303
        Bhargava2004MuscleMetabolicsProbe_MetabolicMuscleParameter glut_max_l: ratio_slow_twitch_fibers=0.55
            provided_muscle_mass=2.322303
        Bhargava2004MuscleMetabolicsProbe_MetabolicMuscleParameter iliopsoas_r: ratio_slow_twitch_fibers=0.5
            provided_muscle_mass=1.243901
        Bhargava2004MuscleMetabolicsProbe_MetabolicMuscleParameter iliopsoas_l: ratio_slow_twitch_fibers=0.5
            provided_muscle_mass=1.243901
        Bhargava2004MuscleMetabolicsProbe_MetabolicMuscleParameter rect_fem_r: ratio_slow_twitch_fibers=0.39
            provided_muscle_mass=0.7294865
        Bhargava2004MuscleMetabolicsProbe_MetabolicMuscleParameter rect_fem_l: ratio_slow_twitch_fibers=0.39
            provided_muscle_mass=0.7294865
        Bhargava2004MuscleMetabolicsProbe_MetabolicMuscleParameter vasti_r: ratio_slow_twitch_fibers=0.5
            provided_muscle_mass=4.179745
        Bhargava2004MuscleMetabolicsProbe_MetabolicMuscleParameter vasti_l: ratio_slow_twitch_fibers=0.5
            provided_muscle_mass=4.179745
        Bhargava2004MuscleMetabolicsProbe_MetabolicMuscleParameter gastroc_r: ratio_slow_twitch_fibers=0.54
            provided_muscle_mass=1.111535
        Bhargava2004MuscleMetabolicsProbe_MetabolicMuscleParameter gastroc_l: ratio_slow_twitch_fibers=0.54
            provided_muscle_mass=1.111535
        Bhargava2004MuscleMetabolicsProbe_MetabolicMuscleParameter soleus_r: ratio_slow_twitch_fibers=0.8
            provided_muscle_mass=1.184064
        Bhargava2004MuscleMetabolicsProbe_MetabolicMuscleParameter soleus_l: ratio_slow_twitch_fibers=0.8
            provided_muscle_mass=1.184064
        Bhargava2004MuscleMetabolicsProbe_MetabolicMuscleParameter dorsiflexors_r: ratio_slow_twitch_fibers=0.7
            provided_muscle_mass=0.6423392
        Bhargava2004MuscleMetabolicsProbe_MetabolicMuscleParameter dorsiflexors_l: ratio_slow_twitch_fibers=0.7
            provided_muscle_mass=0.6423392
